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/batch
! ANSYS input file written by Workbench version 2025 R2
! File used for geometry attach: C:\Projects\Altas Copco\Frugal\actuating lever.stp
/title,MEshing Paper--Static Structural (D5)
/COM,/COM,     ANSYSMotion, 2025.2
/COM,/COM,     MechanicalDropTest, 2.0
/com,--- Data in consistent NMM units. See Solving Units in the help system for more information.
/units,MPA
/prep7
! Turn off shape checking because checks already performed inside WB mesher.
! See help system for more information.
SHPP,OFF,,NOWARN
etcon,set             ! allow ANSYS to choose best KEYOP's for 180x elements, resets any applicable keyopt to MAPDL defaults
/com,*********** Send User Defined Coordinate System(s) ***********
csys,0
/com,*********** Nodes for the whole assembly ***********
nblock,3,,4354
(1i9,3e20.9e3)
        1     2.873865705E+02     2.460094071E+00     2.667511705E+00
        2     5.368292357E+01    -1.287052482E+01     4.163210259E+00
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-1
/com,*********** Elements for Body 1 'actuating lever|Solid1' ***********
et,1,187
MAT,1 $ TYPE,1 $ REAL,1 $ SECNUM,1 $ ESYS,0
eblock,11,COMPACT,,231
(11i9)
        1      251      274      664      660     2445     2525     2447     2446     2524     3407
        2      102      104      148      181     1734     1764     1740     1745     1766     2038
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-1
secnum,1    ! reset the section ID to default
et,2,186
keyo,2,2,1          ! set full integration on SOLID186
MAT,1 $ TYPE,2 $ REAL,1 $ SECNUM,1 $ ESYS,0
eblock,11,COMPACT,,825
(11i9)
      232      115      218      180      137      926      925      773      774     1823     2179
     1969     1821     3918     3681     3680     3683     1824     2345     2181     1972
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-1
secnum,1    ! reset the section ID to default
toffst,273.15,      ! Temperature offset from absolute zero
/com,*********** Set Reference Temperature ***********
tref,22.
/com,*********** Send Materials ***********
Temperature = 'TEMP' ! Temperature
MP,DENS,1,7.85e-09,	! tonne mm^-3
MP,ALPX,1,1.2e-05,	! C^-1
MP,C,1,434000000,	! mm^2 s^-2 C^-1
MP,KXX,1,60.5,	! tonne mm s^-3 C^-1
MP,RSVX,1,0.00017,	! ohm mm
MP,EX,1,200000,	! tonne s^-2 mm^-1
MP,NUXY,1,0.3,
MP,MURX,1,10000,

!************************* Model Summary ********************
!actuating lever|Solid1,	Structural Steel,	matid,	1
!************************* End Model Summary ********************
/com,*********** Fixed Supports ***********
CMBLOCK,_FIXEDSU,NODE,       23
(8i10)
       408       437       439       440       697      -702       810       811
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cmsel,s,_FIXEDSU
d,all,all
nsel,all
/com,*********** Define Force Using Surface Effect Elements ***********
local,12,0,0.,0.,0.,0.,0.,0.
csys,0
et,3,154
MAT,3 $ TYPE,3 $ REAL,3 $ SECNUM,3 $ ESYS,12
eblock,11,COMPACT,,6
(11i9)
     1762      704      713      712      712     3507     3521      712     3506
     1763      704      703      705      713     3502     3503     3510     3507
     1764      705      711      709      713     3509     3517     3518     3510
     1765      713      710      707      712     3519     3513     3514     3521
     1766      709      708      710      713     3515     3516     3519     3518
     1767      712      707      706      704     3514     3512     3505     3506
-1
secnum,1    ! reset the section ID to default
esel,s,type,,3
keyop,3,2,1         ! Apply load in local coordinate system
keyop,3,7,1         ! Use original area so load is constant in large deformation
esel,all
fini
/com,****************************************************************************
/com,*************************    SOLUTION       ********************************
/com,****************************************************************************
/solu
antype,0                   ! static analysis
_thickRatio=  1     ! Ratio of thick parts in the model
eqsl,pcg,1e-8,,,,,,1
cntr,print,1               ! print out contact info and also make no initial contact an error
cncheck,dmp		!	Enable program controlled contact splitting for distributed memory parallel run
dmpoption,emat,no             ! Don't combine emat file for DANSYS
dmpoption,esav,no             ! Don't combine esav file for DANSYS
nldiag,cont,iter           ! print out contact info each equilibrium iteration
rescontrol,,none                 ! Do not keep any restart files
/com,****************************************************
/com,******************* SOLVE FOR LS 1 OF 1 ****************
esel,s,type,,3
nsle
sfe,all,1,pres,1,0.
sfe,all,2,pres,1,-4.44444444444469
sfe,all,3,pres,1,0.
nsel,all
esel,all
nsub,1,1,1
time,1.
outres,erase
outres,all,none
outres,nsol,all,
outres,rsol,all
outres,eangl,all
outres,etmp,all
outres,veng,all
outres,strs,all,
outres,epel,all,
outres,eppl,all,
outres,cont,all,
! *********** WB SOLVE COMMAND ***********
! check interactive state
*get,ANSINTER_,active,,int
*if,ANSINTER_,ne,0,then
/eof
*endif
solve
/com *************** Write FE CONNECTORS *********
CEWRITE,file,ce,,INTE
/com,****************************************************
/com,*************** FINISHED SOLVE FOR LS 1 *************
*get,_NSOLTHREADS,active,0,ntfs
*get,_NSOLPROCESSES,active,0,npfs
*get,_PCGITER,active,,solu,cgiter
/post1
fini
